# Определение законов движения
# Исходные данные
# Ускорение свободного падения
g := 9.81  # м/с^2
# Средняя скорость поршня
v_ср := 0.14  # м/с  # м/с
# Число оборотов коленчатого
# вала
n_1 := 32/60 = 0.533333  # с^-1
ω_1 := 2*π*n_1 = 3.35103  # рад/c
# Отношение длины шатуна к
# длине кривошипа
λ := 5.8
# Положение центра тяжести
# шатуна 2
λ_S2 := 0.275  # с^-1
# Сила сопротивления
P_C1max := 490.5  # Н
P_C2max := 686.7  # Н
F_Mmax := 490.5  # Н
F_Д := 245.25  # Н
# Вес шатуна
G_2 := 120  # Н
m_2 := 120/g = 12.2324  # кг
# Вес плунжена
G_3 := 400  # Н
m_3 := 400/g = 40.7747  # кг
# Положение центра тяжести
# звена 3
L_bs3 := 0.12  # м
# Момент инерции шатуна
J_S2 := 0.069  # кг*м^2
# Коэффициент неравномерности
# вращения вала 1
δ := 1/18
# Маховой момент коленчатого
# вала (без маховика)
J_01 := 0.029  # кг*м^2
# Маховой момент коленчатого
# вала (без маховика)
J_p := 0.05*g = 0.4905  # кг*м^2
# Момент инерции редуктора и
# зубчатых колес 9, 10, приведенных к валу электродввигателя
J_red := 0.03*g = 0.2943  # кг*м^2
# Углоавая координата кривошипа
# для силового расчета
f := 120*deg = 2.0944  # рад
# Число зубьев колес
Z_9 := 10
Z_10 := 25
# Ход плунжера 13 масляного
# насоса
h := 0.01  # м
# Угол давления в кулачковом
# механизме
v := 16*deg = 0.279253  # рад
# Угол рабочего профиля
# кулачка
φ_раб := 330*deg = 5.75959  # рад
# Отношение между велечинами
# ускорений толкателей
ν := 2
# Приложение А
# 1. Проектирование механизма
# 1.1 Определение размеров механизма
l_AO := v_ср/(4*n_1) = 0.065625
l_AB := λ*l_AO = 0.380625
l_AS2 := l_AB*0.275 = 0.104672
# 2. Вычисление передаточных функций механизма
# 2.1. Функции положения.
X_A(φ) := -l_AO*cos(φ)
X_A(f) = 0.0328125
Y_A(φ) := l_AO*sin(φ)
Y_A(f) = 0.0568329
φ_2(φ) := asin(Y_A(φ)/l_AB)
φ_2(f) = 0.149875
X_B(φ) := l_AB*cos(φ_2(φ)) + X_A(φ)
X_B(f) = 0.409171
Y_B(φ) := 0
Y_B(f) = 0
X_S2(φ) := X_A(φ) + l_AS2*cos(φ_2(φ))
X_S2(f) = 0.136311
Y_S2(φ) := Y_A(φ) - l_AS2*sin(φ_2(φ))
Y_S2(f) = 0.0412039
# 2.2. Кинематические передаточные функции
# скорости (аналоги скоростей):
V_qS2X(φ) := d/dφ(X_S2(φ))
V_qS2X(f) = 0.0581955
V_qS2Y(φ) := d/dφ(Y_S2(φ))
V_qS2Y(f) = -0.0237891
V_qS2(φ) := sqrt(V_qS2X(φ)^2 + V_qS2Y(φ)^2)
V_qS2(f) = 0.06287
V_qAX(φ) := d/dφ(X_A(φ))
V_qAX(f) = 0.0568329
V_qAY(φ) := d/dφ(Y_A(φ))
V_qAY(f) = -0.0328125
V_qA(φ) := sqrt(V_qAX(φ)^2 + V_qAY(φ)^2)
V_qA(f) = 0.065625
V_qBX(φ) := d/dφ(X_B(φ))
V_qBX(f) = 0.0617879
V_qB(φ) := |V_qBX(φ)|
V_qB(f) = 0.0617879
ω_q2(φ) := (d/dφ(φ_2(φ)))
ω_q2(f) = -0.0871843
ω_2(φ) := ω_q2(φ)
φ := 0, 0.05 .. 2*π
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X := [X_B(f); X_S2(f); X_A(f); 0]
Y := [Y_B(f); Y_S2(f); Y_A(f); 0]
X1 := [X_B(0*f); X_S2(0*f); X_A(0*f); 0]
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# 1.3 Построение графика силы Pc
H := 2*l_AO = 0.13125
S_B(φ) := X_B(φ) - X_B(0)
P_C2(φ) := (H - S_B(φ))/H*(-P_C2max)
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P_C3(φ) := -(F_Д + S_B(φ)/H*F_Mmax)
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P_C(φ) :=
    (-P_C1max + P_C2(φ) + P_C3(φ)) if 0 ≤ φ ≤ π
    -P_C3(φ) otherwise
φ := 0, .05 .. 2*π
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M_G2PR(φ) := -m_2*g*V_qS2Y(φ)
M_FPR(φ) := P_C(φ)*V_qBX(φ)
M_FPR(f) = -79.1922
M_PRC(φ) := M_FPR(φ) + M_G2PR(φ)
M_PRC(0) = -5.70938
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J_В2(φ) := J_S2*ω_q2(φ)^2
J_P2(φ) := m_2*(V_qS2X(φ)^2 + V_qS2Y(φ)^2)
J_P3(φ) := m_3*V_qBX(φ)^2
J_II(φ) := J_В2(φ) + J_P2(φ) + J_P3(φ)
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M_DPR := integral(M_PRC(φ), φ = 0 .. 2*π)/(-2*π) = 37.9106
M_ΣPR(φ) := M_DPR + M_PRC(φ)
N := 1200
i := 0 .. N
Δφ := 2*π/N
A_φ[i] := Δφ*i
A_M[i] := M_ΣPR(A_φ[i])
cM := lspline(A_φ, A_M)
M_ΣPR(φ) := interp(cM, A_φ, A_M, φ)
N := 1200
i := 0 .. N
Δφ := 2*π/N
A_φ[i] := Δφ*i
A_M[i] := M_ΣPR(A_φ[i])
cM := lspline(A_φ, A_M)
M_ΣPR(φ) := interp(cM, A_φ, A_M, φ)
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# Работа суммарного момента:
A_ΣPR(φ) := integral(M_ΣPR(φ), φ = 0 .. φ)
# Работа внешних сил
A_FPR(φ) := integral(M_FPR(φ), φ = 0 .. φ)
# Работа движущего момента:
A_DPR(φ) := integral(M_DPR, φ = 0 .. φ)
# Средняя угловая скорость:
ω_ср := 2*π*n_1 = 3.35103
# Кинетическая энергия второй группы звеньев:
T_II(φ) := J_II(φ)*ω_ср^2/2
# Изменение кинетической энергии первой группы звеньев:
ΔT_I(φ) := A_ΣPR(φ) - T_II(φ)
ΔT_I(f) = -54.0179
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# Наибольшее изменение кинетической энергии первой группы звеньев за цикл:
t := 300*deg
Given
0 ≤ t ≤ 2*π
t_min := Minimize(ΔT_I, t)
t_min/deg = 151.932
ΔT_I(t_min) = -65.4076
t := 30*deg
Given
0 ≤ t ≤ 2*π
t_max := Maximize(ΔT_I, t)
t_max/deg = 24.209
ΔT_I(t_max) = 6.53767
# Максимальное значение:
T_Imax := ΔT_I(t_max) = 6.53767  # Дж
# Минимальное значение:
T_Imin := ΔT_I(t_min) = -65.4076
# Тогда, наибольшее изменение кинетической энергии:
ΔT_нб := T_Imax - T_Imin = 71.9453
J_PRI := ΔT_нб/(ω_ср^2*δ) = 115.323
Δω(φ) := (ΔT_I(φ) - ((T_Imax + T_Imin)/2))/(ω_ср*J_PRI)
ω(φ) := ω_ср + Δω(φ)
ω_ср = 3.35103
ω(f) = 3.28742
ε(φ) := M_ΣPR(φ)/(J_II(φ) + J_PRI) - ω(φ)^2/(2*(J_II(φ) + J_PRI))*(d/dφ(J_II(φ)))
ε(f) = -0.325344
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# 8. Расчет маховика
J_dop := J_PRI - J_01
J_dop = 115.294
# 8.1 Спл диск
D_MX := 0.366*nthroot(J_dop, 5)
D_MX = 0.945895
m_MX := 8*J_dop/D_MX^2
m_MX = 1030.89
b_MX := 0.2*D_MX
b_MX = 0.189179
# 9.3  Обод
D_MXc := 0.437*nthroot(J_dop, 5)
D_MXc = 1.12939
b_MXc := 0.2*D_MXc
b_MXc = 0.225878
D_MX1 := 0.8*D_MXc
D_MX1 = 0.90351
m_MXc := 6123*(D_MXc^2 - D_MX1^2)*b_MXc
m_MXc = 635.076
G_1 := m_MXc*g = 6230.1
# Силовой расчёт
f := 120*deg
# Вторые передаточные функции
a_qS2X(φ) := d/dφ(V_qS2X(φ))
a_qS2Y(φ) := d/dφ(V_qS2Y(φ))
a_qAX(φ) := d/dφ(V_qAX(φ))
a_qAY(φ) := d/dφ(V_qAY(φ))
a_qBX(φ) := d/dφ(V_qBX(φ))
ε_q2(φ) := d/dφ(ω_q2(φ))
# Ускорения
a_S2X(φ) := a_qS2X(φ)*ω(φ)^2 + V_qS2X(φ)*ε(φ)
a_S2X(f) = -0.356733
a_S2Y(φ) := a_qS2Y(φ)*ω(φ)^2 + V_qS2Y(φ)*ε(φ)
a_S2Y(f) = -0.437556
a_AX(φ) := a_qAX(φ)*ω(φ)^2 + V_qAX(φ)*ε(φ)
a_AX(f) = -0.373099
a_AY(φ) := a_qAY(φ)*ω(φ)^2 + V_qAY(φ)*ε(φ)
a_AY(f) = -0.603526
a_BX(φ) := a_qBX(φ)*ω(φ)^2 + V_qBX(φ)*ε(φ)
a_BX(f) = -0.313584
ε_2(φ) := ε_q2(φ)*ω(φ)^2 + ω_q2(φ)*ε(φ)
ε_2(f) = -1.59119
# 2. Инерционная нагрузка и силы тяжести
# 2.1. Звено 1:
Ф1x := 0
ε(f) = -0.325344
Ф1y := 0
G1 := 0
M_Ф1(φ) := J_PRI*ε(φ)
M_Ф1(f) = -37.5198
J_PRI = 115.323
# 2.2. Звено 2:
Ф2x(φ) := -m_2*a_S2X(φ)
Ф2x(f) = 4.3637
Ф2y(φ) := -m_2*a_S2Y(φ)
Ф2y(f) = 5.35237
G_2 = 120
M_Ф2(φ) := J_S2*ε_2(φ)
M_Ф2(f) = -0.109792
ε_2(f) = -1.59119
# 2.3. Звено 3:
Ф3y := 0
Ф3x(φ) := -m_3*a_BX(φ)
Ф3x(f) = 12.7863
G_3 = 400
M_Ф3(φ) := 0
# 3. Расчёт реакций:
# Создадим вспомогательную матрицу. Заполним её в соответствии
# с таблицей кинематических пар
A11 := [1, 1, 0, 0; 0, -1, 1, 0; 0, 0, -1, 1]
# Создадим нулевую матрицу размерностью А11.
# Заполним указанием последнего элемента.
A12[2, 3] := 0
A12 = [0, 0, 0, 0; 0, 0, 0, 0; 0, 0, 0, 0]
# Создадим нулевую матрицу. Её число строк, как у А11,
# число столбцов на единицу больше числа поступательных кинематических пар.
# Заполним указанием последнего элемента.
A13[2, 1] := 0
A13 = [0, 0; 0, 0; 0, 0]
# Создадим матрицу, содержащую строки коэффициентов , соответствующих суммам про-
# екций сил на ось абсцисс для каждого звена. Она образуется объединением матриц А11,
# А12, А13.
A1 := augment(A11, A12, A13)
A1 = [1, 1, 0, 0, 0, 0, 0, 0, 0, 0; 0, -1, 1, 0, 0, 0, 0, 0, 0, 0; 0, 0, -1, 1, 0, 0, 0, 0, 0, 0]
# Создадим матрицу, содержащую строки коэффициентов,
# соответствующих сумма проекций сил на ось ординат для каждого звена.
# Она образуется объединением матриц А12, А11, А13.
A2 := augment(A12, A11, A13)
A2 = [0, 0, 0, 0, 1, 1, 0, 0, 0, 0; 0, 0, 0, 0, 0, -1, 1, 0, 0, 0; 0, 0, 0, 0, 0, 0, -1, 1, 0, 0]
# Сформируем матрицы, содержащие строки коэффициентов , соответству-
# ющих суммам моментов. Создадим строку плеч для проекций сил на ось абсцисс.
# Её элементами являются ординаты кинематических пар в соотвестствии с таблицей
# кинематических пар.
Y(f) := [0, Y_A(f), Y_B(f), Y_B(f)]
# Сформируем матрицу плеч. Её размерность, как у А11
YY(f) := stack(Y(f), Y(f), Y(f))
YY(f) = [0, 0.0568329, 0, 0; 0, 0.0568329, 0, 0; 0, 0.0568329, 0, 0]
# Сформируем матрицу коэффициентов при проекциях сил на ось абсцисс.
# Она получается путем поэлементного перемножения матриц А11 и YY.
# Знаки инвертируются.
A31(f) := vectorize(-A11*YY(f))
A31(f) = [0, -0.0568329, 0, 0; 0, 0.0568329, 0, 0; 0, 0, 0, 0]
# Создадим строку плеч для проекций сил на ось ординат.
# Её элементами являются абсциссы кинематических пар в
# соответствии с таблицей кинематических пар.
X(f) := [0, X_A(f), X_B(f), X_B(f) - 0.12]
XX(f) := stack(X(f), X(f), X(f))
XX(f) = [
    0, 0.0328125, 0.409171, 0.289171;
    0, 0.0328125, 0.409171, 0.289171;
    0, 0.0328125, 0.409171, 0.289171
]
A32(f) := vectorize(A11*XX(f))
A32(f) = [0, 0.0328125, 0, 0; 0, -0.0328125, 0.409171, 0; 0, 0, -0.409171, 0.289171]
# Создадим матрицу, содержащую коэффициенты при моментах в поступательных
# кинематических парах и неизвестных активных моментах. Первые столбцы соответствуют
# части таблицы кинематических пар, соответствующих поступательным парам. Последний столбец содержит единицу у звена, к которому приложен неизвестный активный момент.
A33 := [0, -1; 0, 0; -1, 0]
# Создадим матрицу, содержащую строки коэффициентов, соответствующих
# суммам моментов для каждого звена. Она образуется объединением матриц
# А31, А32, А33.
A3(f) := augment(A31(f), A32(f), A33)
A3(f) = [
    0, -0.0568329, 0, 0, 0, 0.0328125, 0, 0, 0, -1;
    0, 0.0568329, 0, 0, 0, -0.0328125, 0.409171, 0, 0, 0;
    0, 0, 0, 0, 0, 0, -0.409171, 0.289171, -1, 0
]
# Создадим матрицу, содержащую строки коэффициентов, соответствующих суммам про-
# екций сил в поступательных кинематических парах на направляющие этих пар. Число
# строк равно числу поступательных кинематических пар. В столбцах, соответствующих поступательным парам, задаются косинусы углов наклона направляющих (для А41) или
# синусы (для А42). Матрица А43 нулевая.
A41 := [0, 0, 0, 1]
A42 := [0, 0, 0, 0]
A43 := [0, 0]
A4 := augment(A41, A42, A43)
A4 = [0, 0, 0, 1, 0, 0, 0, 0, 0, 0]
# Создадим полную матрицу коэффициентов путём объединения строк матриц А1, А2,
# А3 и А4.
A(f) := stack(A1, A2, A3(f), A4)
A(f) = [
    1, 1, 0, 0, 0, 0, 0, 0, 0, 0;
    0, -1, 1, 0, 0, 0, 0, 0, 0, 0;
    0, 0, -1, 1, 0, 0, 0, 0, 0, 0;
    0, 0, 0, 0, 1, 1, 0, 0, 0, 0;
    0, 0, 0, 0, 0, -1, 1, 0, 0, 0;
    0, 0, 0, 0, 0, 0, -1, 1, 0, 0;
    0, -0.0568329, 0, 0, 0, 0.0328125, 0, 0, 0, -1;
    0, 0.0568329, 0, 0, 0, -0.0328125, 0.409171, 0, 0, 0;
    0, 0, 0, 0, 0, 0, -0.409171, 0.289171, -1, 0;
    0, 0, 0, 1, 0, 0, 0, 0, 0, 0
]
# Прконтролируем число строк и столбцов полученной матрицы.
rows(A(f)) = 10
cols(A(f)) = 10
# 3.2. Вектор свободных членов
# Создадим строки, содержащие проекции известных сил на ось абсцисс для каждого звена.
B1(f) := -[0; Ф2x(f); Ф3x(f) + P_C(f)]
B1(f) = [0; -4.3637; 1268.89]
Ф3x(f) = 12.7863
# Создадим строки, содержащие проекции известных сил на ось ординат
# для каждого звена
P_C(f) = -1281.68
B2(f) := -[0; Ф2y(f) - G_2; -G_3]
B2(f) = [0; 114.648; 400]
# Создадим строки, содержащие моменты сил, приведённых в столбцах В1 и В2, и
# известные моменты, действующие на каждое звено
B3(f) := -[M_Ф1(f); M_Ф2(f) + (-Ф2x(f)*Y_S2(f)) + (Ф2y(f) - G_2)*X_S2(f); -G_3*(X_B(f) - 0.12)]
B3(f) = [37.5198; 15.9173; 115.668]
B4 := [0]
M_Ф2(f) = -0.109792
B(f) := stack(B1(f), B2(f), B3(f), B4)
B(f) = [0; -4.3637; 1268.89; 0; 114.648; 400; 37.5198; 15.9173; 115.668; 0]
# 3.3. Решение системы
D(φ) := lsolve(A(φ), B(φ))
# Вектор D содержит реакции, располагаемые в соответствии с таблицей кинематических пар. Вначале идут проекции на ось абсцисс, затем проекции на ось ординат, затем моменты в поступательных кинематических парах и неизвестный активный момент.
D(f) := lsolve(A(f), B(f))
F10x(f) := D(f)[0]
F10x(f) = 1264.53
F12x(f) := D(f)[1]
F12x(f) = -1264.53
F23x(f) := D(f)[2]
F23x(f) = -1268.89
F30x(f) := D(f)[3]
F30x(f) = 0
F10y(f) := D(f)[4]
F10y(f) = -108.603
F12y(f) := D(f)[5]
F12y(f) = 108.603
F23y(f) := D(f)[6]
F23y(f) = 223.251
F30y(f) := D(f)[7]
F30y(f) = 623.251
M30(f) := D(f)[8]
M30(f) = -26.7901
M_DPR = 37.9106
M1(f) := D(f)[9]
M1(f) = 37.9106
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# Проверка 1
dJprm2(ϕ) := 2*m_2*(V_qS2X(ϕ)*a_qS2X(ϕ) + V_qS2Y(ϕ)*a_qS2Y(ϕ))
dJprm2(f) = -0.0205215
dJprm3(ϕ) := 2*m_3*V_qBX(ϕ)*a_qBX(ϕ)
dJprm3(f) = -0.136834
dJprj2(ϕ) := 2*J_S2*ω_q2(ϕ)*ε_q2(ϕ)
dJprj2(f) = 0.00180303
ε(f) = -0.325344
J_P2(φ)
ω(f) = 3.28742
M_PRm2(ϕ) := -(J_P2(ϕ)*ε(ϕ) + ω(ϕ)^2/2*dJprm2(ϕ))
M_PRm2(f) = 0.12662
M_PRm3(ϕ) := -(J_P3(ϕ)*ε(ϕ) + ω(ϕ)^2/2*dJprm3(ϕ))
M_PRm3(f) = 0.790037
M_PRJ1(ϕ) := -(J_PRI*ε(ϕ))
M_PRJ1(f) = 37.5198
M_PRJ2(ϕ) := -(J_В2(ϕ)*ε(ϕ) + ω(ϕ)^2/2*dJprj2(ϕ))
M_PRJ2(f) = -0.00957214
M_FPR(f) = -79.1922
M_G2PR(f) = 2.85469
M_PRΣ1(ϕ) := M_PRm2(ϕ) + M_PRm3(ϕ) + M_PRJ2(ϕ) + M_PRJ1(ϕ) + M_FPR(ϕ) + M_G2PR(ϕ)
# Эта сумма должна равняться M_PRD
# с противоположным знаком если ω_1 > 0
M_PRΣ1(f) = -37.9106
M_DPR = 37.9106
