# Определение законов движения
# Исходные данные
# Ускорение свободного падения
g := 9.81  # м/с^2
# Средняя скорость поршня
v_ср := 0.14  # м/с  # м/с
# Число оборотов коленчатого
# вала
n_1 := 32/60 = 0.533333  # с^-1
ω_1 := 2*π*n_1 = 3.35103  # рад/c
# Отношение длины шатуна к
# длине кривошипа
λ := 5.8
# Положение центра тяжести
# шатуна 2
λ_S2 := 0.275  # с^-1
# Сила сопротивления
P_C1max := 490.5  # Н
P_C2max := 686.7  # Н
F_Mmax := 490.5  # Н
F_Д := 245.25  # Н
# Вес шатуна
G_2 := 117.72  # Н
392.4/9.8 = 40.0408
m_2 := 12  # кг
# Вес плунжена
G_3 := 392.4  # Н
m_3 := 40  # кг
# Положение центра тяжести
# звена 3
L_bs3 := 0.12  # м
# Момент инерции шатуна
J_S2 := 0.069  # кг*м^2
# Коэффициент неравномерности
# вращения вала 1
δ := 1/18
# Маховой момент коленчатого
# вала (без маховика)
J_01 := 0.029  # кг*м^2
# Маховой момент коленчатого
# вала (без маховика)
J_p := 0.05*g = 0.4905  # кг*м^2
# Момент инерции редуктора и
# зубчатых колес 9, 10, приведенных к валу электродввигателя
J_red := 0.03*g = 0.2943  # кг*м^2
# Углоавая координата кривошипа
# для силового расчета
f := 120*deg = 2.0944  # рад
# Число зубьев колес
Z_9 := 10
Z_10 := 25
# Ход плунжера 13 масляного
# насоса
h := 0.01  # м
# Угол давления в кулачковом
# механизме
v := 16*deg = 0.279253  # рад
# Угол рабочего профиля
# кулачка
φ_раб := 330*deg = 5.75959  # рад
# Отношение между велечинами
# ускорений толкателей
ν := 2
# Приложение А
# 1. Проектирование механизма
# 1.1 Определение размеров механизма
l_AO := v_ср/(4*n_1) = 0.065625
l_AB := λ*l_AO = 0.380625
l_AS2 := l_AB*0.275 = 0.104672
# 2. Вычисление передаточных функций механизма
# 2.1. Функции положения.
X_A(φ) := -l_AO*cos(φ)
X_A(f) = 0.0328125
Y_A(φ) := l_AO*sin(φ)
Y_A(f) = 0.0568329
φ_2(φ) := asin(Y_A(φ)/l_AB)
φ_2(f) = 0.149875
X_B(φ) := l_AB*cos(φ_2(φ)) + X_A(φ)
X_B(f) = 0.409171
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Y_B(φ) := 0
Y_B(f) = 0
X_S2(φ) := X_A(φ) + l_AS2*cos(φ_2(φ))
X_S2(f) = 0.136311
Y_S2(φ) := Y_A(φ) - l_AS2*sin(φ_2(φ))
Y_S2(f) = 0.0412039
# 2.2. Кинематические передаточные функции
# скорости (аналоги скоростей):
V_qS2X(φ) := d/dφ(X_S2(φ))
V_qS2X(f) = 0.0581955
V_qS2Y(φ) := d/dφ(Y_S2(φ))
V_qS2Y(f) = -0.0237891
V_qS2(φ) := sqrt(V_qS2X(φ)^2 + V_qS2Y(φ)^2)
V_qS2(f) = 0.06287
V_qAX(φ) := d/dφ(X_A(φ))
V_qAX(f) = 0.0568329
V_qAY(φ) := d/dφ(Y_A(φ))
V_qAY(f) = -0.0328125
V_qA(φ) := sqrt(V_qAX(φ)^2 + V_qAY(φ)^2)
V_qA(f) = 0.065625
V_qBX(φ) := d/dφ(X_B(φ))
V_qBX(f) = 0.0617879
V_qB(φ) := |V_qBX(φ)|
V_qB(f) = 0.0617879
ω_q2(φ) := (d/dφ(φ_2(φ)))
ω_q2(f) = -0.0871843
V_qS2(π/2) = 0.065625
ω_2(φ) := ω_q2(φ)
V_qBX(π/2) = 0.065625
φ := 0, 0.05 .. 2*π
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V_qS2(φ)*500 = [
    23.7891; 23.8106; 23.8751; 23.9817; 24.1292; 24.3158; 24.5395; 24.7977; 25.0877; 25.4063
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]
φ*180*240/(360*π) = [
    0; 1.90986; 3.81972; 5.72958; 7.63944; 9.5493; 11.4592; 13.369; 15.2789; 17.1887
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]
180*240/(360*π) = 38.1972
ω_q2(0) = 0.172414
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ω_q2(φ)*300 = [
    51.7241; 51.6614; 51.4734; 51.1603; 50.7229; 50.1618; 49.4782; 48.6734; 47.7488; 46.7064
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]
φ*180/π = [
    0; 2.86479; 5.72958; 8.59437; 11.4592; 14.3239; 17.1887; 20.0535; 22.9183; 25.7831
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]
X := [X_B(f); X_S2(f); X_A(f); 0]
Y := [Y_B(f); Y_S2(f); Y_A(f); 0]
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# 1.3 Построение графика силы Pc
H := 2*l_AO = 0.13125
S_B(φ) := X_B(φ) - X_B(0)
P_C2(φ) := (H - S_B(φ))/H*P_C2max
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S_B(φ)*100 = [
    0; 0.00678824; 0.0271463; 0.0610539; 0.108477; 0.169369; 0.243666; 0.33129; 0.432149; 0.546131
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]
P_C2(φ)*0.03 = [
    20.601; 20.5903; 20.5584; 20.5052; 20.4307; 20.3352; 20.2185; 20.081; 19.9227; 19.7438
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]
P_C3(φ) := F_Д + S_B(φ)/H*F_Mmax
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P_C(φ) :=
    P_C1max + P_C2(φ) + P_C3(φ) if 0 ≤ φ ≤ π
    -P_C3(φ) otherwise
P_C(π + 0.1) = -734.314
φ := 0, .05 .. 2*π
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P_C(181/π) = -355.486
.
P_C(φ)*0.03 = [
    42.6735; 42.6705; 42.6613; 42.6461; 42.6249; 42.5975; 42.5642; 42.5249; 42.4797; 42.4286
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]
φ*180*240/(360*π) = [
    0; 1.90986; 3.81972; 5.72958; 7.63944; 9.5493; 11.4592; 13.369; 15.2789; 17.1887
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]
M_G2PR(φ) := -m_2*g*V_qS2Y(φ)
M_FPR(φ) := -P_C(φ)*V_qBX(φ)
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M_FPR(φ)/2 = [
    0; -1.93089; -3.85905; -5.78172; -7.69614; -9.59946; -11.4888; -13.3611; -15.2135; -17.0425
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]
M_FPR(π/2) = -87.4696
J_В2(φ) := J_S2*ω_q2(φ)^2
J_В2(0) = 0.00205113
J_P2(φ) := m_2*(V_qS2X(φ)^2 + V_qS2Y(φ)^2)
J_P3(φ) := m_3*V_qBX(φ)^2
J_II(φ) := J_В2(φ) + J_P2(φ) + J_P3(φ)
J_В2(φ)*500 = [
    1.02556; 1.02308; 1.01564; 1.00333; 0.986243; 0.964546; 0.938436; 0.908154; 0.873981; 0.836236
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]
500*J_II(φ) = [
    14.6076; 14.7772; 15.2853; 16.1297; 17.3067; 18.8112; 20.6365; 22.7742; 25.2141; 27.9445
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]
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J_P3(φ)*500 = [
    0; 0.147432; 0.589147; 1.32339; 2.34721; 3.65643; 5.24556; 7.10776; 9.23475; 11.6167
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]
500*J_P2(φ) = [
    13.5821; 13.6067; 13.6805; 13.803; 13.9732; 14.1902; 14.4525; 14.7583; 15.1054; 15.4915
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]
M_FPR(f) = -79.1922
M_DPR := integral(M_FPR(φ), φ = 0 .. 2*π)/(-2*π) = 37.9106
M_ΣPR(φ) := M_DPR + M_FPR(φ)
N := 1200
i := 0 .. N
Δφ := 2*π/N
A_φ[i] := Δφ*i
A_M[i] := M_ΣPR(A_φ[i])
cM := lspline(A_φ, A_M)
M_ΣPR(φ) := interp(cM, A_φ, A_M, φ)
N := 1200
i := 0 .. N
Δφ := 2*π/N
A_φ[i] := Δφ*i
A_M[i] := M_ΣPR(A_φ[i])
cM := lspline(A_φ, A_M)
M_ΣPR(φ) := interp(cM, A_φ, A_M, φ)
M_DPR = 37.9106
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# Работа суммарного момента:
A_ΣPR(φ) := integral(M_ΣPR(φ), φ = 0 .. φ)
# Работа внешних сил
A_FPR(φ) := integral(M_FPR(φ), φ = 0 .. φ)
# Работа движущего момента:
ω_ср := 2*π*n_1 = 3.35103
A_DPR(φ) := integral(M_DPR, φ = 0 .. φ)
T_II(φ) := J_II(φ)*ω_ср^2/2
T_II(π/2) = 1.25739
# Средняя угловая скорость:
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ω_ср := 2*π*n_1 = 3.35103
# Кинетическая энергия второй группы звеньев:
T_II(φ) := J_II(φ)*ω_ср^2/2
# Изменение кинетической энергии первой группы звеньев:
ΔT_I(φ) := A_ΣPR(φ) - T_II(φ)
ΔT_I(f) = -49.0517
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A_ΣPR(φ)/5 = [
    0; 0.359794; 0.680994; 0.96368; 1.20799; 1.41412; 1.58232; 1.71289; 1.80622; 1.86272
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]
ΔT_I(φ) = [
    -0.164035; 1.63303; 3.23332; 4.63727; 5.84561; 6.85936; 7.67985; 8.30872; 8.74794; 8.9998
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]
A_FPR(φ)/5 = [
    0; -0.0193112; -0.0772174; -0.173637; -0.308431; -0.481408; -0.692316; -0.940847; -1.22663; -1.54923
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]
A_ΣPR(φ) = [
    0; 1.79897; 3.40497; 4.8184; 6.03996; 7.0706; 7.91159; 8.56446; 9.03108; 9.3136
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]
A_DPR(φ)/5 = [
    0; 0.379106; 0.758211; 1.13732; 1.51642; 1.89553; 2.27463; 2.65374; 3.03284; 3.41195
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]
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A_ΣPR(π*155/180) = -62.4443
# Наибольшее изменение кинетической энергии первой группы звеньев за цикл:
t := 300*deg
Given
0 ≤ t ≤ 2*π
t_min := Minimize(ΔT_I, t)
t_min/deg = 155.48
ΔT_I(t_min) = -62.8695
t := 30*deg
Given
0 ≤ t ≤ 2*π
t_max := Maximize(ΔT_I, t)
t_max/deg = 28.2661
ΔT_I(t_max) = 9.06856
# Максимальное значение:
T_Imax := ΔT_I(t_max) = 9.06856  # Дж
# Минимальное значение:
T_Imin := ΔT_I(t_min) = -62.8695
# Тогда, наибольшее изменение кинетической энергии:
ΔT_нб := T_Imax - T_Imin = 71.9381
J_PRI := ΔT_нб/(ω_ср^2*δ) = 115.312
Δω(φ) := (ΔT_I(φ) - ((T_Imax + T_Imin)/2))/(ω_ср*J_PRI)
ω(φ) := ω_ср + Δω(φ)
ε(φ) := M_ΣPR(φ)/(J_II(φ) + J_PRI) - ω(φ)^2/(2*(J_II(φ) + J_PRI))*(d/dφ(J_II(φ)))
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ω(φ)*200 = [
    684.045; 684.975; 685.803; 686.53; 687.155; 687.68; 688.105; 688.43; 688.657; 688.788
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]
ε(φ)*50 = [
    16.4341; 14.7255; 13.0192; 11.3178; 9.62382; 7.94007; 6.26923; 4.61412; 2.97763; 1.36277
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]
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# 8. Расчет маховика
J_dop := J_PRI - J_01
J_dop = 115.283
# 8.1 Спл диск
D_MX := 0.366*nthroot(J_dop, 5)
D_MX = 0.945876
m_MX := 8*J_dop/D_MX^2
m_MX = 1030.83
b_MX := 0.2*D_MX
b_MX = 0.189175
# 9.3  Обод
D_MXc := 0.437*nthroot(J_dop, 5)
D_MXc = 1.12937
b_MXc := 0.2*D_MXc
b_MXc = 0.225873
D_MX1 := 0.8*D_MXc
D_MX1 = 0.903492
m_MXc := 6123*(D_MXc^2 - D_MX1^2)*b_MXc
m_MXc = 635.039
# Силовой расчёт
f := 120*deg
# Вторые передаточные функции
a_qS2X(φ) := d/dφ(V_qS2X(φ))
a_qS2Y(φ) := d/dφ(V_qS2Y(φ))
a_qBX(φ) := d/dφ(V_qBX(φ))
ε_q2(φ) := d/dφ(ω_q2(φ))
# Ускорения
a_S2X(φ) := a_qS2X(φ)*ω(φ)^2 + V_qS2X(φ)*ε(φ)
a_S2Y(φ) := a_qS2Y(φ)*ω(φ)^2 + V_qS2Y(φ)*ε(φ)
a_BX(φ) := a_qBX(φ)*ω(φ)^2 + V_qBX(φ)*ε(φ)
ε_2(φ) := ε_q2(φ)*ω(φ)^2 + ω_q2(φ)*ε(φ)
# Диада 2-3
Φ_3X(φ) := -m_3*a_BX(φ)
M_Φ2(φ) := -J_S2*ε_2(φ)
Φ_2X(φ) := -m_2*a_S2X(φ)
Φ_2Y(φ) := -m_2*a_S2Y(φ)
B_1(φ) := [
    1, 0, 0, 0, 0, 0;
    0, 1, 1, 0, 0, 0;
    0, 0, 0, 1, 0, 0;
    -1, 0, 0, 0, 1, 0;
    0, -1, 0, 0, 0, 1;
    0, -X_B(φ), 0, 0, -Y_A(φ), X_A(φ)
]
P_1(φ) := [
    -P_C(φ) + m_3*g/sqrt(2) - Φ_3X(φ);
    m_3*g/sqrt(2);
    0;
    m_2*g/sqrt(2) - Φ_2X(φ);
    m_2*g/sqrt(2) - Φ_2Y(φ);
    Φ_2X(φ)*Y_S2(φ) - Φ_2Y(φ)*X_S2(φ) + m_2*g/sqrt(2)*X_S2(φ) - m_2*g/sqrt(2)*Y_S2(φ) - M_Φ2(φ)
]
R_1(φ) := lsolve(B_1(φ), P_1(φ))
R_BX(φ) := R_1(φ)[0]
R_BY(φ) := R_1(φ)[1]
R_30(φ) := R_1(φ)[2]
M_30(φ) := R_1(φ)[3]
R_A2X(φ) := R_1(φ)[4]
R_A2Y(φ) := R_1(φ)[5]
R_B(φ) := sqrt(R_BX(φ)^2 + R_BY(φ)^2)
φ_B(φ) := angle(R_BX(φ), R_BY(φ))
x_B := 0
y_B := 0
y_B := R_B(f)
x_B := φ_B(f)
n := 0, π/12 .. 2*π - π/12
φ := 0, π/12 .. 2*π
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# Начальный механизм
M_Φ1(φ) := -(J_01 + J_red)*ε(φ)
B_3 := [1, 0, 0; 0, 1, 0; 0, 0, 1]
P_3(φ) := [R_A2X(φ); R_A2Y(φ); -M_Φ1(φ) + Y_A(φ)*R_A2X(φ) - X_A(φ)*R_A2Y(φ)]
R_3(φ) := lsolve(B_3, P_3(φ))
R_OX(φ) := R_3(φ)[0]
R_OY(φ) := R_3(φ)[1]
M_д(φ) := R_3(φ)[2]
R_O(φ) := sqrt(R_OY(φ)^2 + R_OX(φ)^2)
M_д(f) = -60.2142
