# ОПРЕДЕЛЕНИЕ КАЧЕСТВЕННЫХ ПОКАЗАТЕЛЕЙ  ЗУБЧАТЫХ ПЕРЕДАЧ
# Исходные данные
# Параметры передачи
# Модуль
m := 3
# Число зубьев шестерни
Z1 := 10
# Угол наклона зубьев
β := 0*deg
# Число зубьев колеса
Z2 := 25
# Параметры исходного производящего контура режущего инструмента
# Угол главного профиля
α := 20*deg
# Коэффициент высоты головки зуба
ha_ := 1
# Коэффициент радиального зазора
c_ := 0.25
# Вспомогательная функция инвалюты
inv(t) := tan(t) - t
# Индекс 1 соответсвует шестерни, 2 - колесу.
# Расчетные формулы
# С учетом наклона зубьев (вариативно)
# Торцевой модуль
mt := m/cos(β)
# Торцевой коэфф. высоты головки зуба
hat_ := ha_*cos(β)
# Торцевой коэфф. радиального зазора
ct_ := c_*cos(β)
# Торцевой угол главного профиля
αt := atan(tan(α)/cos(β))
# Инвалюта в торцевом сечении
invαt := inv(αt)
# Радиус скругления режущего контура
ρft := ct_*mt/(1 - sin(αt))
# Торцевой шаг
Pt := mt*π
# Толщина зуба исходного контура по делительной прямой
S0 := Pt/2
# Хорда дугового щага по делительной окружности шестерни
p1x := mt*Z1*sin(π/Z1)
# Хорда дугового щага по делительной окружности колеса
p2x := mt*Z2*sin(π/Z2)
# Делительные окружности
R1 := mt*Z1/2
R2 := mt*Z2/2
# Основные окружности
Rb1 := R1*cos(αt)
Rb2 := R2*cos(αt)
# Минимальное число зубьев, при котором колесо может быть нарезано без смещения
Zmint := 2*hat_/sin(αt)^2
# Минимальные коэффициенты смещения
Xmint1 := hat_*(Zmint - Z1)/Zmint
Xmint2 := hat_*(Zmint - Z2)/Zmint
# Инвалюта главного контура в торцевом сечении
invαtw(X1, X2) := inv(αt) + 2*(X1 + X2)/(Z1 + Z2)*tan(αt)
# Угол зацепления, как численное решение уравнения
αtw := αt
αtw(X1, X2) := root(inv(αtw) - invαtw(X1, X2), αtw)
# Начальные окружности
Rw1(X1, X2) := R1*cos(αt)/cos(αtw(X1, X2))
Rw2(X1, X2) := R2*cos(αt)/cos(αtw(X1, X2))
# Межосевое расстояние
aw(X1, X2) := Rw1(X1, X2) + Rw2(X1, X2)
# Коэффициент воспринимаемого смещения
y(X1, X2) := (aw(X1, X2) - R1 - R2)/mt
# Коэффициент уравнительного смещения
dy(X1, X2) := X1 + X2 - y(X1, X2)
# Окружности вершин
Ra1(X1, X2) := R1 + hat_*mt + X1*mt - dy(X1, X2)*mt
Ra2(X1, X2) := R2 + hat_*mt + X2*mt - dy(X1, X2)*mt
# Окружности впадин
Rf1(X1, X2) := R1 - hat_*mt - ct_*mt + X1*mt
Rf2(X1, X2) := R2 - hat_*mt - ct_*mt + X2*mt
# Высота зуба
h(X1, X2) := mt*(2*hat_ + ct_ - dy(X1, X2))
# Толщина зуба по делительной окружности
S1(X1) := Pt/2 + 2*X1*mt*tan(αt)
S2(X2) := Pt/2 + 2*X2*mt*tan(αt)
# Угол зацепления шестерни
αa1(X1, X2) := acos(Rb1/Ra1(X1, X2))
# Угол зацепления колеса
αa2(X1, X2) := acos(Rb2/Ra2(X1, X2))
# Толщина зуба по окружности вершин
Sa1(X1, X2) := 2*Ra1(X1, X2)*(S1(X1)/(2*R1) + invαt - inv(αa1(X1, X2)))
Sa2(X1, X2) := 2*Ra2(X1, X2)*(S2(X2)/(2*R2) + invαt - inv(αa2(X1, X2)))
# Коэффициент торцевого перекрытия
εα(X1, X2) := (sqrt(Ra1(X1, X2)^2 - Rb1^2) + sqrt(Ra2(X1, X2)^2 - Rb2^2) - aw(X1, X2)*sin(αtw(X1, X2)))/(Pt*cos(αt))
# Коэффициент осевого перекрытия
ψb := 4
εβ(X1, X2) := ψb*sin(β)/π
# Коэффициент перекрытия общий
εγ(X1, X2) := εα(X1, X2) + εβ(X1, X2)
# Коэффициент давления
υp(X1, X2) := 2*(Z1 + Z2)/(Z1*Z2*cos(αt)*tan(αtw(X1, X2)))
# Коэффициенты удельного скольжения
λ1расч(X1, X2) := (1 + Z1/Z2)*Z2*(tan(αa2(X1, X2)) - tan(αtw(X1, X2)))/((Z1 + Z2)*tan(αtw(X1, X2)) - Z2*tan(αa2(X1, X2)))
λ2расч(X1, X2) := (1 + Z1/Z2)*Z1*(tan(αa1(X1, X2)) - tan(αtw(X1, X2)))/((Z1 + Z2)*tan(αtw(X1, X2)) - Z1*tan(αa1(X1, X2)))
# Длины линий зацепления: допулюсной, заполюсной
ρL2(X1, X2) := R2*sin(αt) - mt*(ha_ - X2)/sin(αt)
ρL1(X1, X2) := R1*sin(αt) - mt*(ha_ - X1)/sin(αt)
# Длины активных линий зацепления: допулюсной, заполюсной
ρF1(X1, X2) := aw(X1, X2)*sin(αtw(X1, X2)) - Ra2(X1, X2)*sin(αa2(X1, X2))
ρF2(X1, X2) := aw(X1, X2)*sin(αtw(X1, X2)) - Ra1(X1, X2)*sin(αa1(X1, X2))
# Варьируем Х1
i := 0, 1 .. 11
X1[i] := i/10
# Задаем
X2 := 0.5
# Результаты расчета
X2 = 0.5
R1 = 15
R2 = 37.5
Rb1 = 14.0954
hat_ = 1
Rb2 = 35.2385
Pt = 9.42478
mt = 3
p1x = 9.27051
ct_ = 0.25
αt/deg = 20
ρft = 1.13985
p2x = 9.39999
Zmint = 17.0973
Xmint1 = 0.415111
Xmint2 = -0.462222
S0 = 4.71239
S2(X2) = 5.8043
X1[i] = [0; 0.1; 0.2; 0.3; 0.4; 0.5; 0.6; 0.7; 0.8; 0.9; 1; 1.1]
y(X1[i], X2) = [0.458327; 0.542431; 0.624652; 0.705171; 0.784141; 0.861692; 0.937937; 1.01297; 1.08689; 1.15976; 1.23166; 1.30264]
dy(X1[i], X2) = [0.0416725; 0.0575688; 0.0753477; 0.0948287; 0.115859; 0.138308; 0.162063; 0.187025; 0.213109; 0.240237; 0.268341; 0.297362]
αtw(X1[i], X2)/deg = [23.6932; 24.2947; 24.8642; 25.4055; 25.9217; 26.4152; 26.8882; 27.3427; 27.7801; 28.2019; 28.6093; 29.0034]
Rw1(X1[i], X2) = [15.3929; 15.4649; 15.5354; 15.6044; 15.6721; 15.7386; 15.8039; 15.8683; 15.9316; 15.9941; 16.0557; 16.1165]
Rw2(X1[i], X2) = [38.4821; 38.6624; 38.8385; 39.0111; 39.1803; 39.3465; 39.5099; 39.6707; 39.8291; 39.9852; 40.1393; 40.2914]
h(X1[i], X2) = [6.62498; 6.57729; 6.52396; 6.46551; 6.40242; 6.33508; 6.26381; 6.18892; 6.11067; 6.02929; 5.94498; 5.85791]
aw(X1[i], X2) = [53.875; 54.1273; 54.374; 54.6155; 54.8524; 55.0851; 55.3138; 55.5389; 55.7607; 55.9793; 56.195; 56.4079]
X1[i] = [0; 0.1; 0.2; 0.3; 0.4; 0.5; 0.6; 0.7; 0.8; 0.9; 1; 1.1]
Ra1(X1[i], X2) = [17.875; 18.1273; 18.374; 18.6155; 18.8524; 19.0851; 19.3138; 19.5389; 19.7607; 19.9793; 20.195; 20.4079]
Ra2(X1[i], X2) = [41.875; 41.8273; 41.774; 41.7155; 41.6524; 41.5851; 41.5138; 41.4389; 41.3607; 41.2793; 41.195; 41.1079]
Rf1(X1[i], X2) = [11.25; 11.55; 11.85; 12.15; 12.45; 12.75; 13.05; 13.35; 13.65; 13.95; 14.25; 14.55]
Rf2(X1[i], X2) = [35.25; 35.25; 35.25; 35.25; 35.25; 35.25; 35.25; 35.25; 35.25; 35.25; 35.25; 35.25]
S1(X1[i]) = [4.71239; 4.93077; 5.14915; 5.36754; 5.58592; 5.8043; 6.02268; 6.24106; 6.45945; 6.67783; 6.89621; 7.11459]
Sa1(X1[i], X2) = [1.947; 1.83476; 1.71876; 1.59931; 1.4767; 1.35119; 1.22297; 1.09223; 0.959134; 0.823815; 0.686402; 0.547006]
Sa2(X1[i], X2) = [1.76153; 1.8206; 1.8863; 1.95784; 2.03455; 2.11584; 2.20118; 2.2901; 2.38219; 2.47707; 2.5744; 2.67387]
X1[i] = [0; 0.1; 0.2; 0.3; 0.4; 0.5; 0.6; 0.7; 0.8; 0.9; 1; 1.1]
εα(X1[i], X2) = [1.35107; 1.31684; 1.28253; 1.24814; 1.21365; 1.17905; 1.14433; 1.10947; 1.07446; 1.03929; 1.00395; 0.968426]
εγ(X1[i], X2) = [1.35107; 1.31684; 1.28253; 1.24814; 1.21365; 1.17905; 1.14433; 1.10947; 1.07446; 1.03929; 1.00395; 0.968426]
λ1расч(X1[i], X2) = [-10.299; -35.1119; 19.9707; 7.07707; 4.0165; 2.64241; 1.86012; 1.35394; 0.998872; 0.735525; 0.532049; 0.369831]
λ2расч(X1[i], X2) = [0.631519; 0.648458; 0.664146; 0.678787; 0.692538; 0.705527; 0.717854; 0.729604; 0.740844; 0.751632; 0.762017; 0.772039]
υp(X1[i], X2) = [0.679012; 0.660093; 0.642972; 0.627367; 0.613055; 0.599857; 0.58763; 0.576253; 0.565626; 0.555667; 0.546304; 0.537477]
ε_доп := 1.05
X11 := 1
Given
εα(X11, X2) == ε_доп
X_ε := Find(X11) = 0.869595
X111 := 1
Given
Sa1(X111, X2)/mt == 0.4
X_Sa := Find(X111) = 0.617708
X1_ε := [X_ε; X_ε]
Y1_ε := [5; 0]
X1_min := [Xmint1; Xmint1]
Y1_min := [5; 0]
X1_sa := [X_Sa; X_Sa]
Y1_sa := [5; 0]
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