# Расчет кулачкового механизма
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# Исходные данные
# Рабочий угол кулачка:
φ_р := 330 deg
# Угол подъема:
φ_п := 165 deg
# Угол спада:
φ_сп := 165 deg
# Допустимый угол давления:
θ_доп := 16 deg
# Эксцентриситет:
ex := 0
# Ход толкателя:
h := 0.01
# Отношение ускорений:
λ == a_1/a_2
λ := 2
# Рис.1 Вид функции ускорения толкателя и внешений вид кулачка
# Расчет
# Из условия равества площадей:
φ21 == φ11*λ
# Из уловия равенства угла подъема и спада:
φ11 + φ21 == fr/2
# Первое приближение:
φ11 := 10 deg
φ21 := 10 deg
# Решение :
Given
φ21 == φ11*λ
φ11 + φ21 == φ_р/2
Φ := Find(φ11, φ21) = [55; 110] deg
# Переобозначаем решение:
φ_1 := Φ[0] = 55 deg
φ_2 := Φ[1] = 110 deg
# В относительных единицах функция ускорения толкателя примет вид:
# Пусть:
a2 := 1
a1 := λ*a2 = 2
k := 0.001*deg
Ускорения := [a1; a1; -a2; -a2; a1; a1]
Углы := [0; φ_1; φ_1 + k; φ_1 + 2*φ_2; φ_1 + 2*φ_2 + k; 2*φ_1 + 2*φ_2]
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Round(φ_р, 0.5)
# Для нахождения истиных значений а1 и а2 два раза проинтегрируем данную функцию:
φ_р = 5.75959
# Интерполяция графика ускорений толкателя:
a_отн(φ) := linterp(Углы, Ускорения, φ)
φ := 0, 1 deg .. φ_р
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# Скорость толкателя:
V_отн(φ) := integral(a_отн(φ), φ = 0 .. φ)
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# Перемещение толкателя:
s_отн(φ) := integral(V_отн(φ), φ = 0 .. φ)
φ := 0, 10 deg .. φ_р
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# Реальные значения a1 и a2
φ := 0, 1 deg .. φ_р
a_2ист := h/s_отн(φ_1 + φ_2) = 0.00361754
a_1ист := a_2ист*λ = 0.00723508
# Функция ускорения толкателя примет вид:
Ускорения := [a_1ист; a_1ист; -a_2ист; -a_2ист; a_1ист; a_1ист]
Углы := [0; φ_1; φ_1 + k; φ_1 + 2*φ_2; φ_1 + 2*φ_2 + k; 2*φ_1 + 2*φ_2]
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# Интерполяция графика ускорений толкателя:
a_ист(φ) := linterp(Углы, Ускорения, φ)
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# Скорость толкателя:
V_ист(φ) :=
    integral(a_ист(φ), φ = 0 .. φ) if 0 ≤ φ ≤ φ_р
    0 otherwise
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# Перемещение толкателя:
s_ист(φ) :=
    integral(V_ист(φ), φ = 0 .. φ) if 0 ≤ φ ≤ φ_р
    0 otherwise
φ := 0, 10 deg .. φ_р
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s_ист(φ_р/2) = 0.00998522
# Перемещение совпадает с рачсетным:
h = 0.01
# Определение основных размеров механизма
φ := 0, 5 deg .. φ_р
# Фазовый портрет кулачкового механизма:
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# ОДР определяем из условий невозможности превышения максимально допустимого угла давления
Y_0(φ) := (V_ист(φ) + ex)/tan(θ_доп) - s_ист(φ)
f_c1 := 10 deg
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f_crit := Maximize(Y_0, f_c1) = 0.961984
Y_0(f_crit) = 0.0209248
# Уравнения линий, касательных к фазовому портерту, имеют вид
x1(y) := -tan(θ_доп)*(y + Y_0(f_crit))
x2(y) := tan(θ_доп)*(y + Y_0(f_crit))
y := -1.3*Y_0(f_crit), -1.1*Y_0(f_crit) .. h
Y_01 := Y_0(f_crit)
# Выбираем из ряда Ra40. Ближайшее значение в большую сторону:
s_0 := |Y_01| = 0.0209248
# Радиус центрового профиля кулачка:
r_0 := sqrt(Y_01^2 + ex^2) = 0.0209248
# Линия на графике:
r1x := [-ex; 0]
r1y := [-Y_01; 0]
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# Радиус ролика:
R := 0.25*r_0 = 0.0052312
# Из ряда Ra40 ближайшее знаечние:
R := 0.0055
# Радиус начальной шайбы кулачка:
r_0 = 0.0209248
# Построим график изменения угла давления:
# Угол давления определяет положение нормали в высшей кинематической паре относительно вектора линейной скорости контактной точки ведомого звена.
# Т.к движение толкателя поступательное, то вычислим угол давления по формуле:
υ(φ) := atan((V_ист(φ) - ex)/(s_ист(φ) + sqrt(r_0^2 + ex^2)))
ex = 0  # - эксентриситет
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# Проверка :
f := 275 deg
f1 := 21.7 deg
k := Minimize(υ, f) = 275.224 deg
k1 := Maximize(υ, f1) = 56.9201 deg
υ(k) = -16.095 deg
θ_доп = 16 deg  # условие выполнено
υ(k1) = 15.7806 deg
# Профиль кулачка
# Окружность эксцентрисетета
X_A(φ) := -ex*cos(φ)
Y_A(φ) := -ex*sin(φ)
# Окружность центрового профиля
X_B(φ) := X_A(φ) - s_0*sin(φ)
Y_B(φ) := Y_A(φ) + s_0*cos(φ)
# Центровой профиль
X_C(φ) := ex*cos(φ) - (s_0 + s_ист(φ))*sin(φ)
Y_C(φ) := ex*sin(φ) + (s_0 + s_ист(φ))*cos(φ)
# Конструктивный профиль
X_K(φ) := -(X_C(φ) - R*cos((φ + π/2) - υ(φ)))
Y_K(φ) := Y_C(φ) - R*sin((φ + π/2) - υ(φ))
# Уравненение окружности ролика:
f := 0
x_p(φ) := -X_C(f) + R*cos(φ)
y_p(φ) := Y_C(f) + R*sin(φ)
# Прямая толкателя
μ_l := 5000
φ := 0, 10 deg .. 360 deg
X := [-X_C(f); -X_C(f) - h*sin(f)]
Y := [Y_C(f); Y_C(f) + h*cos(f)]
μ_l*Y_C(φ) =  # no stored result; disabled
μ_l*X_K(φ) =  # no stored result; disabled
μ_l*Y_K(φ) =  # no stored result; disabled
-μ_l*X_C(φ) =  # no stored result; disabled
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