# Расчет параметров для построения станочного зацепления
# Исходные данные:
# Число зубьев шестерни:
Z_1 := 10
# Модуль зубчатых колес:
m := 3  # мм
# annotation to a formula above: Калькуляторы для проведения расчетов при выполнении курсовых проектов. Скачан с сайта Tubusa.net.
# Масштаб на чертеже:
μ_l := 8000  # мм/м
# Число реек для копирования:
n := 6
# Расчет:
# Радиус делительной окружности:
r_1 := m*Z_1/2 = 15  # мм
# Угловой шаг шестерни:
τ_1 := 360/Z_1 = 36  # град
# Приращение угла:
Δφ := τ_1/n = 6  # град
# Приращение линейного шага:
ΔS := r_1*Δφ*π/180 = 1.5708  # мм
# Итератор профилей реек:
i := 0, 1 .. n = [0; 1; 2; 3; 4; 5; 6]  # Угол поворота:  # Скопировать профиль рейки через:  # Повернуть i-тый профиль на угол:
φ_1 := Δφ*i
# Длина i-го отрезка:
S_1 := ΔS*i*μ_l/1000
S_1 = [0; 12.5664; 25.1327; 37.6991; 50.2655; 62.8319; 75.3982]
φ_1 = [0; 6; 12; 18; 24; 30; 36]
